f(x, y) := x + cos(y/e)
y0 := 2.5
x0 := 1.4
x1 := 2.4
h := 0.1
solve block
    # constraints
    y'(x) == f(x, y(x))
    y(x0) == y0
    # solver
    y := odesolve(y(x), x1)
end solve block
# [plot: y(x) vs x]
EularMethod(F, a, b, y0, h) :=
    i ← 0
    x ← a
    y[0] ← y0
    while x < b
        y[i + 1] ← y[i] + h*F(x, y[i])
        x ← x + h
        i ← i + 1
    y
y1 := EularMethod(f, 1.4, 2.4, 2.5, h) = [2.5; 2.70061; 2.90518; 3.1133; 3.32458; 3.53866; 3.75523; 3.97405; 4.19491; 4.41767; 4.64224]
RungeKuttaMethod(F, a, b, y0, h) :=
    i ← 0
    x ← a
    y[0] ← y0
    while x < b
        k1 ← h*F(x, y[i])
        k2 ← h*F(x + h/2, y[i] + k2/2)
        k3 ← h*F(x + h/2, y[i] + k2/2)
        k4 ← h*F(x + h, y[i] + k3)
        y[i + 1] ← y[i] + (k1 + k2 + k3 + k4)/6
        x ← x + h
        i ← i + 1
    y
y2 := RungeKuttaMethod(f, 1.4, 2.4, 2.5, h) = [2.5; 2.63555; 2.77445; 2.91704; 3.06315; 3.21261; 3.36528; 3.521; 3.67965; 3.8411; 4.00526]
D(x, y) := f(x, 2.5)
y3 := rkfixed(2.5, 1.4, 2.4, 11, D)[:, 1] = [2.5; 2.6865; 2.88127; 3.0843; 3.29559; 3.51515; 3.74297; 3.97906; 4.22342; 4.47603; 4.73691; 5.00606]
