f(x) := (x - 2)^2*2^x - 1
# [plot: f(x) vs x]
e := 0.001
x0 := 1
x1 := 1.5
x2 := 2
x3 := 2.5
HalfSegmentDiv(f, x0, x1, e) :=
    if f(x0)*f(x1) > 0
        ∞
    else
        while |x0 - x1| ≥ e
            x ← (x0 + x1)/2
            if f(x)*f(x0) > 0
                x0 ← x
            else
                x1 ← x
        x
a1 := HalfSegmentDiv(f, x0, x1, 0.001)
a1 = 1.37988
ChordsMethod(f, x0, x1, e) :=
    x[0] ← x0
    x[1] ← x1
    i ← 1
    while |x[i - 1] - x[i]| > e
        k ← (f(x[i]) - f(x[i - 1]))/(x[i] - x[i - 1])
        x[i + 1] ← x[i] - f(x[i])/k
        i ← i + 1
    x[i]
a2 := ChordsMethod(f, x0, x1, 0.001)
a2 = 1.38019
NewtonMethod(f, x0, e) :=
    x ← x0
    f1(x) ← d/dx(f(x))
    y ← f(x)/f1(x)
    while |y| > e
        x ← x - y
        y ← f(x)/f1(x)
    x
a3 := NewtonMethod(f, x0, 0.001)
a3 = 1.38018
SectantMethod(f, x0, x1, e) :=
    while |x1 - x0| > e
        x ← x1 - (f(x1)*(x1 - x0))/(f(x1) - f(x0))
        x0 ← x1
        x1 ← x
    x ← x1
    x
a4 := SectantMethod(f, x0, x1, 0.001)
a4 = 1.38019
x := 1
a0 := root(f(x), x)
a0 = 1.38019
a5 := HalfSegmentDiv(f, x2, x3, 0.001)
a5 = 2.43066
a6 := ChordsMethod(f, x2, x3, 0.001)
a6 = 2.43067
a7 := NewtonMethod(f, x3, 0.001)
a7 = 2.43075
a8 := SectantMethod(f, x2, x3, 0.001)
a8 = 2.43067
x5 := 2
a9 := root(f(x5), x5)
a9 = 2.43067
