A := [-0.20, 1.60, -0.01; -0.30, 0.10, -1.50; 1.20, -0.20, 0.30]
B := [0.03; 0.40; -0.60]
X := lsolve(A, B)
transpose(X) = [-0.462482, -0.0401656, -0.176848]
Exchange(C, i) :=
    k ← i + 1
    while C[k, i] == 0
        k ← k + 1
    for j ∈ 0 .. rows(C)
        S ← C[i, j]
        C[i, j] ← C[k, j]
        C[k, j] ← S
    C
Simplex(A, B) :=
    N ← rows(A)
    C ← augment(A, B)
    for i ∈ 0 .. N - 2
        if C[i, i] == 0
            C ← Exchange(C, i)
        for j ∈ 0 .. N
            C[i, N - j] ← C[i, N - j]/C[i, i]
        for m ∈ i + 1 .. N - 1
            α ← C[m, i]
            for j ∈ i .. N
                C[m, j] ← C[m, j] - α*C[i, j]
    C
Gauss(Simplex, A, B) :=
    C ← Simplex(A, B)
    N ← rows(A) - 1
    V[N] ← C[N, N + 1]/C[N, N]
    for j ∈ 1 .. N
        V[N - j] ← (1/C[N - j, N - j])*(C[N - j, N + 1] - sum(C[N - j, N - k]*V[N - k], k = 0 .. j - 1))
    V
X1 := Gauss(Simplex, A, B)
transpose(X1) = [-0.462482, -0.0401656, -0.176848]
