f(x) := (2*sin(x + π/3) - 0.5*x^2 + 1)
# [plot: f(x) vs x]
e := 0.001
x0 := 1.5
x1 := 2
HalfSegmentDiv(f, x0, x1, e) :=
    if f(x0)*f(x1) > 0
        ∞
    else
        while |x0 - x1| ≥ e
            x ← (x0 + x1)/2
            if f(x)*f(x0) > 0
                x0 ← x
            else
                x1 ← x
        x
a1 := HalfSegmentDiv(f, x0, x1, 0.001)
a1 = 1.79004
ChordsMethod(f, x0, x1, e) :=
    x[0] ← x0
    x[1] ← x1
    i ← 1
    while |x[i - 1] - x[i]| > e
        k ← (f(x[i]) - f(x[i - 1]))/(x[i] - x[i - 1])
        x[i + 1] ← x[i] - f(x[i])/k
        i ← i + 1
    x[i]
a2 := ChordsMethod(f, x0, x1, 0.001)
a2 = 1.78929
NewtonMethod(f, x0, e) :=
    x ← x0
    f1(x) ← d/dx(f(x))
    y ← f(x)/f1(x)
    while |y| > e
        x ← x - y
        y ← f(x)/f1(x)
    x
a3 := NewtonMethod(f, x0, 0.001)
a3 = 1.78943
SectantMethod(f, x0, x1, e) :=
    while |x1 - x0| > e
        x ← x1 - (f(x1)*(x1 - x0))/(f(x1) - f(x0))
        x0 ← x1
        x1 ← x
    x ← x1
    x
a4 := SectantMethod(f, x0, x1, 0.001)
a4 = 1.78929
f1(x) := x + (2*sin(x + π/3) - 0.5*x^2 + 1)/4
# [plot: f1(x), x vs x]
SingleIterationMethod(f, x0, N, e) :=
    x ← f(x0)
    i ← 0
    while i ≤ N and |f(x) - x| > e*|x|
        i ← i + 1
        x ← f(x)
    x
a5 := SingleIterationMethod(f1, x0, 5, 0.001)
a5 = 1.78903
x := 1
a0 := root(f(x), x, 0, π)
a0 = 1.78929
d/dx(f(x)) → -1.91716819291
|-1.91716819291| = 1.91717
